FINISH
/POST1
ALLSEL,ALL
RSYS,0
SET,LAST
*GET,CHK_TLAST,ACTIVE,0,SET,TIME
ALLSEL,ALL

! =========================================================
! 1.1 Y方向位移云图：沿用 Y 向示例的视角与左、中、右取景
! =========================================================
/TITLE,Y_Displacement
/VIEW,1,0,0,1
/VUP,1,Y
/AUTO,1
PLNSOL,U,Y,0,1.0

! 先画完整模型，取得自动取景距离；每组只乘一次0.2
/USER,1
/DIST,1,0.2,1

! 左：X=0
/FOCUS,1,0,0,0,0
/REPLOT
/IMAGE,SAVE,'D:\111AAAjxy\FloatingTunnel\OUTPUT\test\Y_Displacement_LEFT',PNG

! 中：X=LT/2，保持同一观察距离
/FOCUS,1,LT/2,0,0,0
/REPLOT
/IMAGE,SAVE,'D:\111AAAjxy\FloatingTunnel\OUTPUT\test\Y_Displacement_MID',PNG

! 右：X=LT，保持同一观察距离
/FOCUS,1,LT,0,0,0
/REPLOT
/IMAGE,SAVE,'D:\111AAAjxy\FloatingTunnel\OUTPUT\test\Y_Displacement_RIGHT',PNG

! =========================================================
! 1.2 Z方向位移云图：沿用 Y 向示例的视角与左、中、右取景
! =========================================================
/TITLE,Z_Displacement
/VIEW,1,0,0,1
/VUP,1,Y
/AUTO,1
PLNSOL,U,Z,0,1.0

! 先画完整模型，取得自动取景距离；每组只乘一次0.2
/USER,1
/DIST,1,0.2,1

! 左：X=0
/FOCUS,1,0,0,0,0
/REPLOT
/IMAGE,SAVE,'D:\111AAAjxy\FloatingTunnel\OUTPUT\test\Z_Displacement_LEFT',PNG

! 中：X=LT/2，保持同一观察距离
/FOCUS,1,LT/2,0,0,0
/REPLOT
/IMAGE,SAVE,'D:\111AAAjxy\FloatingTunnel\OUTPUT\test\Z_Displacement_MID',PNG

! 右：X=LT，保持同一观察距离
/FOCUS,1,LT,0,0,0
/REPLOT
/IMAGE,SAVE,'D:\111AAAjxy\FloatingTunnel\OUTPUT\test\Z_Displacement_RIGHT',PNG

! =========================================================
! 1.3 总位移云图：沿用 Y 向示例的视角与左、中、右取景
! =========================================================
/TITLE,SUM_Displacement
/VIEW,1,0,0,1
/VUP,1,Y
/AUTO,1
PLNSOL,U,SUM,0,1.0

! 先画完整模型，取得自动取景距离；每组只乘一次0.2
/USER,1
/DIST,1,0.2,1

! 左：X=0
/FOCUS,1,0,0,0,0
/REPLOT
/IMAGE,SAVE,'D:\111AAAjxy\FloatingTunnel\OUTPUT\test\SUM_Displacement_LEFT',PNG

! 中：X=LT/2，保持同一观察距离
/FOCUS,1,LT/2,0,0,0
/REPLOT
/IMAGE,SAVE,'D:\111AAAjxy\FloatingTunnel\OUTPUT\test\SUM_Displacement_MID',PNG

! 右：X=LT，保持同一观察距离
/FOCUS,1,LT,0,0,0
/REPLOT
/IMAGE,SAVE,'D:\111AAAjxy\FloatingTunnel\OUTPUT\test\SUM_Displacement_RIGHT',PNG

! 2. 管体内力：保持原CHECK的BEAM188结果序号
ALLSEL,ALL
ESEL,S,TYPE,,1
NSLE,S
ETABLE,ERAS
ETABLE,MIY,SMISC,2
ETABLE,MJY,SMISC,15
ETABLE,MIZ,SMISC,3
ETABLE,MJZ,SMISC,16
ETABLE,QIY,SMISC,6
ETABLE,QJY,SMISC,19
ETABLE,QIZ,SMISC,5
ETABLE,QJZ,SMISC,18
ETABLE,AXI_I,SMISC,1
ETABLE,AXI_J,SMISC,14
ETABLE,MX_I,SMISC,4
ETABLE,MX_J,SMISC,17

! =========================================================
! 2.1 绕Y轴弯矩图：沿用 Y 向示例的视角与左、中、右取景
! =========================================================
/TITLE,Y_Bending_Moment
/VIEW,1,0,0,1
/VUP,1,Y
/AUTO,1
PLLS,MIY,MJY,-1

! 先画完整模型，取得自动取景距离；每组只乘一次0.2
/USER,1
/DIST,1,0.2,1

! 左：X=0
/FOCUS,1,0,0,0,0
/REPLOT
/IMAGE,SAVE,'D:\111AAAjxy\FloatingTunnel\OUTPUT\test\Y_Bending_Moment_LEFT',PNG

! 中：X=LT/2，保持同一观察距离
/FOCUS,1,LT/2,0,0,0
/REPLOT
/IMAGE,SAVE,'D:\111AAAjxy\FloatingTunnel\OUTPUT\test\Y_Bending_Moment_MID',PNG

! 右：X=LT，保持同一观察距离
/FOCUS,1,LT,0,0,0
/REPLOT
/IMAGE,SAVE,'D:\111AAAjxy\FloatingTunnel\OUTPUT\test\Y_Bending_Moment_RIGHT',PNG

! =========================================================
! 2.2 绕Z轴弯矩图：沿用 Y 向示例的视角与左、中、右取景
! =========================================================
/TITLE,Z_Bending_Moment
/VIEW,1,0,0,1
/VUP,1,Y
/AUTO,1
PLLS,MIZ,MJZ,-1

! 先画完整模型，取得自动取景距离；每组只乘一次0.2
/USER,1
/DIST,1,0.2,1

! 左：X=0
/FOCUS,1,0,0,0,0
/REPLOT
/IMAGE,SAVE,'D:\111AAAjxy\FloatingTunnel\OUTPUT\test\Z_Bending_Moment_LEFT',PNG

! 中：X=LT/2，保持同一观察距离
/FOCUS,1,LT/2,0,0,0
/REPLOT
/IMAGE,SAVE,'D:\111AAAjxy\FloatingTunnel\OUTPUT\test\Z_Bending_Moment_MID',PNG

! 右：X=LT，保持同一观察距离
/FOCUS,1,LT,0,0,0
/REPLOT
/IMAGE,SAVE,'D:\111AAAjxy\FloatingTunnel\OUTPUT\test\Z_Bending_Moment_RIGHT',PNG

! =========================================================
! 2.3 Y方向剪力图：沿用 Y 向示例的视角与左、中、右取景
! =========================================================
/TITLE,Y_Shear_Force
/VIEW,1,0,0,1
/VUP,1,Y
/AUTO,1
PLLS,QIY,QJY,-1

! 先画完整模型，取得自动取景距离；每组只乘一次0.2
/USER,1
/DIST,1,0.2,1

! 左：X=0
/FOCUS,1,0,0,0,0
/REPLOT
/IMAGE,SAVE,'D:\111AAAjxy\FloatingTunnel\OUTPUT\test\Y_Shear_Force_LEFT',PNG

! 中：X=LT/2，保持同一观察距离
/FOCUS,1,LT/2,0,0,0
/REPLOT
/IMAGE,SAVE,'D:\111AAAjxy\FloatingTunnel\OUTPUT\test\Y_Shear_Force_MID',PNG

! 右：X=LT，保持同一观察距离
/FOCUS,1,LT,0,0,0
/REPLOT
/IMAGE,SAVE,'D:\111AAAjxy\FloatingTunnel\OUTPUT\test\Y_Shear_Force_RIGHT',PNG

! =========================================================
! 2.4 Z方向剪力图：沿用 Y 向示例的视角与左、中、右取景
! =========================================================
/TITLE,Z_Shear_Force
/VIEW,1,0,0,1
/VUP,1,Y
/AUTO,1
PLLS,QIZ,QJZ,-1

! 先画完整模型，取得自动取景距离；每组只乘一次0.2
/USER,1
/DIST,1,0.2,1

! 左：X=0
/FOCUS,1,0,0,0,0
/REPLOT
/IMAGE,SAVE,'D:\111AAAjxy\FloatingTunnel\OUTPUT\test\Z_Shear_Force_LEFT',PNG

! 中：X=LT/2，保持同一观察距离
/FOCUS,1,LT/2,0,0,0
/REPLOT
/IMAGE,SAVE,'D:\111AAAjxy\FloatingTunnel\OUTPUT\test\Z_Shear_Force_MID',PNG

! 右：X=LT，保持同一观察距离
/FOCUS,1,LT,0,0,0
/REPLOT
/IMAGE,SAVE,'D:\111AAAjxy\FloatingTunnel\OUTPUT\test\Z_Shear_Force_RIGHT',PNG

! =========================================================
! 2.5 管体轴力图：沿用 Y 向示例的视角与左、中、右取景
! =========================================================
/TITLE,Axial_Force
/VIEW,1,0,0,1
/VUP,1,Y
/AUTO,1
PLLS,AXI_I,AXI_J,-1

! 先画完整模型，取得自动取景距离；每组只乘一次0.2
/USER,1
/DIST,1,0.2,1

! 左：X=0
/FOCUS,1,0,0,0,0
/REPLOT
/IMAGE,SAVE,'D:\111AAAjxy\FloatingTunnel\OUTPUT\test\Axial_Force_LEFT',PNG

! 中：X=LT/2，保持同一观察距离
/FOCUS,1,LT/2,0,0,0
/REPLOT
/IMAGE,SAVE,'D:\111AAAjxy\FloatingTunnel\OUTPUT\test\Axial_Force_MID',PNG

! 右：X=LT，保持同一观察距离
/FOCUS,1,LT,0,0,0
/REPLOT
/IMAGE,SAVE,'D:\111AAAjxy\FloatingTunnel\OUTPUT\test\Axial_Force_RIGHT',PNG

! =========================================================
! 2.6 管体扭矩图：沿用 Y 向示例的视角与左、中、右取景
! =========================================================
/TITLE,Torsional_Moment
/VIEW,1,0,0,1
/VUP,1,Y
/AUTO,1
PLLS,MX_I,MX_J,-1

! 先画完整模型，取得自动取景距离；每组只乘一次0.2
/USER,1
/DIST,1,0.2,1

! 左：X=0
/FOCUS,1,0,0,0,0
/REPLOT
/IMAGE,SAVE,'D:\111AAAjxy\FloatingTunnel\OUTPUT\test\Torsional_Moment_LEFT',PNG

! 中：X=LT/2，保持同一观察距离
/FOCUS,1,LT/2,0,0,0
/REPLOT
/IMAGE,SAVE,'D:\111AAAjxy\FloatingTunnel\OUTPUT\test\Torsional_Moment_MID',PNG

! 右：X=LT，保持同一观察距离
/FOCUS,1,LT,0,0,0
/REPLOT
/IMAGE,SAVE,'D:\111AAAjxy\FloatingTunnel\OUTPUT\test\Torsional_Moment_RIGHT',PNG

! 3.1 斜缆轴力（TYPE=3）
ALLSEL,ALL
ESEL,S,TYPE,,3
NSLE,S
ETABLE,ERAS
ETABLE,CABLE_F,SMISC,1
/GRAPHICS,FULL

! =========================================================
! 3.1 斜缆轴力云图：沿用 Y 向示例的视角与左、中、右取景
! =========================================================
/TITLE,Diagonal_Cable_Force
/VIEW,1,0,0,1
/VUP,1,Y
/AUTO,1
PLETAB,CABLE_F,NOAV

! 先画完整模型，取得自动取景距离；每组只乘一次0.2
/USER,1
/DIST,1,0.2,1

! 左：X=0
/FOCUS,1,0,0,0,0
/REPLOT
/IMAGE,SAVE,'D:\111AAAjxy\FloatingTunnel\OUTPUT\test\Diagonal_Cable_Force_LEFT',PNG

! 中：X=LT/2，保持同一观察距离
/FOCUS,1,LT/2,0,0,0
/REPLOT
/IMAGE,SAVE,'D:\111AAAjxy\FloatingTunnel\OUTPUT\test\Diagonal_Cable_Force_MID',PNG

! 右：X=LT，保持同一观察距离
/FOCUS,1,LT,0,0,0
/REPLOT
/IMAGE,SAVE,'D:\111AAAjxy\FloatingTunnel\OUTPUT\test\Diagonal_Cable_Force_RIGHT',PNG

! 3.2 竖缆轴力（TYPE=4）
ALLSEL,ALL
ESEL,S,TYPE,,4
NSLE,S
ETABLE,ERAS
ETABLE,CABLE_F,SMISC,1
/GRAPHICS,FULL

! =========================================================
! 3.2 竖缆轴力云图：沿用 Y 向示例的视角与左、中、右取景
! =========================================================
/TITLE,Vertical_Cable_Force
/VIEW,1,0,0,1
/VUP,1,Y
/AUTO,1
PLETAB,CABLE_F,NOAV

! 先画完整模型，取得自动取景距离；每组只乘一次0.2
/USER,1
/DIST,1,0.2,1

! 左：X=0
/FOCUS,1,0,0,0,0
/REPLOT
/IMAGE,SAVE,'D:\111AAAjxy\FloatingTunnel\OUTPUT\test\Vertical_Cable_Force_LEFT',PNG

! 中：X=LT/2，保持同一观察距离
/FOCUS,1,LT/2,0,0,0
/REPLOT
/IMAGE,SAVE,'D:\111AAAjxy\FloatingTunnel\OUTPUT\test\Vertical_Cable_Force_MID',PNG

! 右：X=LT，保持同一观察距离
/FOCUS,1,LT,0,0,0
/REPLOT
/IMAGE,SAVE,'D:\111AAAjxy\FloatingTunnel\OUTPUT\test\Vertical_Cable_Force_RIGHT',PNG

! =========================================================
! 4. 跨中位移时程：每张整图保存，不进行左中右取景
! =========================================================
ALLSEL,ALL
FINISH
/POST26
NUMVAR,20
XVAR,1
TIMERANGE
NSOL,2,N_MID,U,Y,UY_MID
NSOL,3,N_MID,U,Z,UZ_MID
STORE,NEW

/AUTO,1
/XRANGE
/YRANGE
/GFORMAT,DEFA
/GROPT,DIG1,4
/GROPT,DIG2,6
/GRID,1
/AXLAB,X,Time (s)
/AXLAB,Y,Displacement (m)

! Y向单独一张，便于查看自身变化
/TITLE,Midspan Y Displacement Time History
PLVAR,2
/IMAGE,SAVE,'D:\111AAAjxy\FloatingTunnel\OUTPUT\test\Y_Displacement_Time_History',PNG

! Z向单独一张
/TITLE,Midspan Z Displacement Time History
PLVAR,3
/IMAGE,SAVE,'D:\111AAAjxy\FloatingTunnel\OUTPUT\test\Z_Displacement_Time_History',PNG

! 保留原CHECK的Y、Z双线同图
/TITLE,Midspan Y and Z Displacement Time History
PLVAR,2,3
/IMAGE,SAVE,'D:\111AAAjxy\FloatingTunnel\OUTPUT\test\Y_Z_Displacement_Time_History',PNG

! =========================================================
! 5. 原CHECK的峰值时刻云图
! U_MAX：指定时间区间内，跨中UY的最大代数值
! T_MAX：上述最大值对应的总时间
! 注意：这不等于全结构、全时段的总位移最大值。
! 跳过2.2s前的数据不自动证明其后已达到稳态。
! =========================================================
TIMERANGE,2.2,CHK_TLAST
STORE,NEW
*GET,U_MAX,VARI,2,EXTREM,VMAX
*GET,T_MAX,VARI,2,EXTREM,TMAX
*STATUS,U_MAX
*STATUS,T_MAX

FINISH
/POST1
ALLSEL,ALL
RSYS,0
SET,NEAR,,,,T_MAX

! =========================================================
! 5.1 跨中UY峰值时刻的总位移云图：沿用 Y 向示例的视角与左、中、右取景
! =========================================================
/TITLE,SUM_Displacement_At_Y_MAX
/VIEW,1,0,0,1
/VUP,1,Y
/AUTO,1
PLNSOL,U,SUM,0,1.0

! 先画完整模型，取得自动取景距离；每组只乘一次0.2
/USER,1
/DIST,1,0.2,1

! 左：X=0
/FOCUS,1,0,0,0,0
/REPLOT
/IMAGE,SAVE,'D:\111AAAjxy\FloatingTunnel\OUTPUT\test\SUM_Displacement_At_Y_MAX_LEFT',PNG

! 中：X=LT/2，保持同一观察距离
/FOCUS,1,LT/2,0,0,0
/REPLOT
/IMAGE,SAVE,'D:\111AAAjxy\FloatingTunnel\OUTPUT\test\SUM_Displacement_At_Y_MAX_MID',PNG

! 右：X=LT，保持同一观察距离
/FOCUS,1,LT,0,0,0
/REPLOT
/IMAGE,SAVE,'D:\111AAAjxy\FloatingTunnel\OUTPUT\test\SUM_Displacement_At_Y_MAX_RIGHT',PNG

! 结束后恢复全部选择和自动取景
ALLSEL,ALL
/AUTO,1
FINISH
